# ===================================================================================
# 2D Bidisperse Granular System (frictionless)
#
# N=512, diameter ratio = 1:1.4
# Contact Model: Hooke contact + Damped dynamics relaxation (注意granular不支持FIRE)
# Oprating System: Windows
# ===================================================================================


shell cmd /c "if exist configuration_init.dat del configuration_init.dat"
shell cmd /c "if exist configuration_final.dat del configuration_final.dat"
shell cmd /c "if exist log.lammps del log.lammps"
shell cmd /c "if exist compress_process.txt del compress_process.txt"
shell cmd /c "if exist my_jamming_log.txt del my_jamming_log.txt"


# Step 1: 单位规制
clear
units           lj        # 这里说明的是长度、时间是无量纲、归一化单位
dimension       2
boundary        p p p
atom_style      sphere
# newton、comm_modify是"颗粒接触模型"的必要设置
newton          off
comm_modify     vel yes


# Step 2: 参数设置
# 外部脚本传入随机数种子
variable        seed equal 12345
variable        seed2 equal ${seed}+24681
# 实验体系 N=512
variable        N1 equal 256
variable        N2 equal 256
variable        N  equal ${N1}+${N2}
variable        d1 equal 1.0
variable        d2 equal 1.4
variable        rho equal 1.0
# 计算盒子边长
variable        phi0 equal 0.50                    # 初始体积分数设低一些，避免严重重叠
variable        pi equal 3.141592653589793         # LAMMPS 里没有内置 π
variable        A1 equal ${N1}*${pi}*(${d1}*0.5)^2
variable        A2 equal ${N2}*${pi}*(${d2}*0.5)^2
variable        Area equal ${A1}+${A2}
variable        L0 equal sqrt(v_Area/v_phi0)       # 等价于sqrt(${Area}/${phi0})
variable        L0_fmt format L0 "%.2f"


# Step 3: 创建模拟盒,随机插入粒子
region          box block 0 ${L0} 0 ${L0} -0.1 0.1 units box
print           "================== Create box and atoms... =================="
create_box      2 box
create_atoms    1 random ${N1} ${seed}  box
create_atoms    2 random ${N2} ${seed2} box
# 设置粒子属性
set             type 1 diameter ${d1}
set             type 1 density  ${rho}      # 设置粒子密度,Lammps会自动计算质量和转动惯量
set             type 2 diameter ${d2}
set             type 2 density  ${rho}
print           "============================================================"
# 强制二维运动
fix             planar all enforce2d        # 关键:强制所有粒子只能在z=0平面内运动


# Step 4: 定义相互作用/接触模型
# ---------------------------------------------------------------------
# Granular Hooke contact
# gran/hooke/history Kn Kt gamma_n gamma_t mu dampflag
# 这里设 Kt = 0, gamma_t = 0, mu = 0 => 无摩擦
# ---------------------------------------------------------------------
pair_style      gran/hooke/history 2.0e4 0.0 100.0 0.0 0.0 1
pair_coeff      * *
neighbor        0.5 bin
neigh_modify    delay 0 every 1 check yes
# 设置松弛方式:  "阻尼动力学松弛"(FIRE能量最小化的替代方案)
# Dynamics: nve/sphere + viscous damping
fix             integrator all nve/sphere  # 因为系统粒子的atom_style sphere,不能用普通nve
fix             damp all viscous 20.0


# Step 5: 定义观测量
compute         ke_trans all ke
compute         ke_rot   all erotate/sphere
variable        KE    equal "c_ke_trans"             # 系统-平动动能
variable        KEr   equal "c_ke_rot"               # 系统-转动动能
variable        phi   equal "v_Area/(lx*ly)"         # 当前体积分数,从L0 -> 1
variable        KEtot equal "c_ke_trans + c_ke_rot"  # 系统总动能
variable        pr    equal "press"                  # 系统压力
# 记录和盒子相关变量
variable        st    equal "step"                   # 当前步数
variable        lxv   equal "lx"                     # 当前盒子长度x
variable        lyv   equal "ly"                     # 当前盒子长度y


# Step 6: 控制输出内容
# (1)基本参数输出
print           "================== Simulation Parameters ==================" append my_jamming_log.txt
print           "L0 = ${L0_fmt}" append my_jamming_log.txt
print           "N = ${N}, N1 = ${N1}, N2 = ${N2}" append my_jamming_log.txt
print           "phi = ${phi0}" append my_jamming_log.txt
print           "seed = ${seed}" append my_jamming_log.txt
print           "===========================================================" append my_jamming_log.txt
# (2)热力学输出(每5000步输出一轮):
thermo          5000
thermo_style    custom step atoms lx ly v_phi press ke c_ke_rot
# (3)轨迹输出(每5000步输出一次,用Ovito可视化)
dump            traj all custom 5000 granular_compress.strj id type x y z radius vx vy vz fx fy fz
dump_modify     traj sort id                         # 让每帧按粒子id排序,对后处理很方便

# 保存快照
write_data      configuration_init.dat


# Step 7: 运行模拟
# Step 7.1: 松弛
print           "================== Stage 1: initial relaxation ==================" append my_jamming_log.txt
timestep        5.0e-5
run             50000

# Step 7.2 AQS循环压缩
print           "================= Stage 2: Compression Loop... ==================" append my_jamming_log.txt
print           "cycle step phi press KEtotal" append my_jamming_log.txt
print           "cycle step phi press KEtotal" append compress_process.txt
# 压缩参数
variable        ncycle equal 150
variable        scale  equal 0.998

# --------------------------------------------------------------------------------
# 编写循环压缩代码: loop_compress
label           loop_compress
variable        i loop ${ncycle}
# @before(压缩之前的我不关注)
# print         "${i} ${st} ${phi} ${pr} ${KEtot}" append log.txt
change_box      all x scale ${scale} y scale ${scale} remap units box
velocity        all set 0.0 0.0 0.0       # 压缩后清零速度，避免把上一轮残余动量带进来
# @after
run             1000        # 每轮给足够松弛时间
print           "${i} ${st} ${phi} ${pr} ${KEtot}" append my_jamming_log.txt
print           "${i} ${st} ${phi} ${pr} ${KEtot}" append compress_process.txt
next            i
jump            SELF loop_compress
# --------------------------------------------------------------------------------

# 保存最终输出构型
write_data      configuration_final.dat
print           "================= Compression Finished! Final phi = ${phi} ==================" append my_jamming_log.txt
